OpenVSP model (file version 5), 4 components.
Geometry view with OpenVSP parameter names; values to 6 digits, angles in degrees, lengths in the model's unit.
Overall bounding box: X_Min=0.290405 X_Len=7.4882 Y_Min=-5.02646 Y_Len=10.0529 Z_Min=-0.592033 Z_Len=2.25103

Fuselage "Fuselage"
  location (X Y Z) 0.349 0 0, rotation 0 0 0
  bounding box size 7.18918 1.44897 1.33928
  Design: Length=7.118
  cross sections:
    n  XLocPercent  YLocPercent  ZLocPercent  shape
    0  0            0            0            general fuselage BotStr=0.444429 BotTanAngle=90 CornerRad=0 Height=0.433 LowStr=0.601286 MaxWidthLoc=0.142857 TopStr=1.62086 TopTanAngle=90 UpStr=0.496714 Width=0.927
    1  0.136977     0            -0.018685    general fuselage BotStr=1.5 BotTanAngle=90 CornerRad=0 Height=0.846 LowStr=1.5 MaxWidthLoc=0 TopStr=1.5 TopTanAngle=90 UpStr=1.5 Width=1.22
    2  0.367659     0            0.00913178   general fuselage BotStr=1.5 BotTanAngle=90 CornerRad=0 Height=1.272 LowStr=1.5 MaxWidthLoc=0 TopStr=1.1 TopTanAngle=90 UpStr=1.5 Width=1.22
    3  0.464316     0            0.006322     general fuselage BotStr=1.5 BotTanAngle=90 CornerRad=0 Height=1.242 LowStr=1.5 MaxWidthLoc=0 TopStr=1.1 TopTanAngle=90 UpStr=1.5 Width=1.174
    4  0.943804     0            0.03737      general fuselage BotStr=0.83 BotTanAngle=90 CornerRad=0 Height=0.449 LowStr=0.83 MaxWidthLoc=0 TopStr=0.83 TopTanAngle=90 UpStr=0.83 Width=0.393
    5  1            0            0.0660298    point

Wing "Wing"
  location (X Y Z) 1.413 0 -0.446, rotation 0 0 0
  symmetric about XZ
  bounding box size 2.51779 10.0529 0.712183
  totals: TotalSpan=9.768 TotalProjectedSpan=9.72122 TotalChord=1.82967 TotalArea=15.2229 TotalAR=6.2079 RelativeTwistFlag=1
  root: chord 2.519, twist 2, NACA 63-series A=1 IdealCl=0.4 ThickChord=0.15
  sections:
    n  Span    Root_Chord  Tip_Chord  Area     Sweep  Sweep_Location  Dihedral  Twist  Twist_Location  tip airfoil
    1  0.6145  2.519       2.0475     1.40306  35.39  0               0         0      0.25            as above
    2  0.6145  2.0475      1.576      1.11332  35.39  0               6         0      0.25            as above
    3  3.655   1.576       1.212      5.09507  0.89   0.25            6         0      0.25            as above

Wing "Hstab"
  location (X Y Z) 6.896 0 0.295, rotation 0 0 0
  symmetric about XZ
  bounding box size 0.806 3.688 0.0967637
  totals: TotalSpan=3.688 TotalProjectedSpan=3.688 TotalChord=0.715 TotalArea=2.63692 TotalAR=5.15804
  root: chord 0.806, twist 0, NACA 4-series Camber=0 CamberLoc=0.2 ThickChord=0.12
  sections:
    n  Span   Root_Chord  Tip_Chord  Area     Sweep  Sweep_Location  Dihedral  Twist  Twist_Location  tip airfoil
    1  1.844  0.806       0.624      1.31846  2.71   0               0         0      0.25            as above

Wing "Vstab"
  location (X Y Z) 5.058 0 0.47, rotation 90 0 0
  bounding box size 2.7206 0.144637 1.189
  totals: TotalSpan=1.189 TotalProjectedSpan=1.189 TotalChord=1.38725 TotalArea=1.37114 TotalAR=1.03105
  root: chord 2.409, twist 0, NACA 4-series Camber=0 CamberLoc=0.2 ThickChord=0.06
  sections:
    n  Span   Root_Chord  Tip_Chord  Area      Sweep  Sweep_Location  Dihedral  Twist  Twist_Location  tip airfoil
    1  0.259  2.409       1.195      0.466718  78.58  0               0         0      0.25            NACA 4-series Camber=0 CamberLoc=0.2 ThickChord=0.12
    2  0.93   1.195       0.75       0.904425  36.51  0               0         0      0.25            as above
